<?xml version="1.0"?>

<!--
	File:     HUMO213.xml
	Author:   Aero-Matic v 0.82

	Inputs:
		name:           JUMO213
		type:           piston
		power:          1750 hp
		augmented?      no
		injected?       yes, MW50
-->

<piston_engine name="JUMO213">
	<minmp unit="INHG">         12.0 </minmp>
	<maxmp unit="INHG">         88.5 </maxmp>
	<displacement unit="IN3"> 2135.3 </displacement>
	<maxhp>        1750.00 </maxhp>
	<cycles>          4.0 </cycles>
	<idlerpm>       400.0 </idlerpm>
	<maxrpm>       3250.0 </maxrpm>
	<sparkfaildrop>   0.6 </sparkfaildrop>
	<volumetric-efficiency> 1.81 </volumetric-efficiency>

	<!-- Optional items that affect engine performance -->
	<!-- Defining <bsfc> over-rides the built-in horsepower calculations -->
	<bsfc>               0.15  </bsfc>
	<stroke unit="IN">   6.49  </stroke>
	<bore unit="IN">     5.91  </bore>
	<cylinders>         14.00  </cylinders>
	<compression-ratio> 12.00  </compression-ratio>

	<boostmanual>   1 </boostmanual>
	<numboostspeeds>3 </numboostspeeds>
	<boostoverride> 0 </boostoverride>
	<takeoffboost>  0 </takeoffboost> <!-- takeoff boost not used because it works poorly. -->

	<ratedboost1 unit="INHG"> 12.1 </ratedboost1>
	<ratedpower1 unit="HP">   2250 </ratedpower1>
	<ratedrpm1>               2700 </ratedrpm1>
	<ratedaltitude1 unit="FT"> 0 </ratedaltitude1>

	<ratedboost2 unit="INHG"> 18.1 </ratedboost2>
	<ratedpower2 unit="HP">   3250 </ratedpower2>
	<ratedrpm2>               2400 </ratedrpm2>
	<ratedaltitude2 unit="FT"> 8000 </ratedaltitude2>

	<ratedboost3 unit="INHG"> 68.1 </ratedboost3>
	<ratedpower3 unit="HP">   3800 </ratedpower3>
	<ratedrpm3>               1800 </ratedrpm3>
	<ratedaltitude3 unit="FT"> 39700 </ratedaltitude3>

</piston_engine>
